*Heading
 UX=1
** Job name: VERIFY-UMAX-UX=1 Model name: Model-1
** Generated by: Abaqus/CAE 6.14-1
*Preprint, echo=NO, model=NO, history=NO, contact=NO
**
** PARTS
**
*Part, name=Part-1
*Node
      1,           4.,           1.,  0.100000001
      2,           4.,           0.,  0.100000001
      3,           4.,           1.,           0.
      4,           4.,           0.,           0.
      5,           0.,           1.,  0.100000001
      6,           0.,           0.,  0.100000001
      7,           0.,           1.,           0.
      8,           0.,           0.,           0.
*User element, nodes=8, type=U12, properties=2, iproperties=5, coordinates=3, variables=100
  1,2,3,11,12,13
*Element, type=U12
1, 5, 6, 8, 7, 1, 2, 4, 3
*Elset, elset=CompositeLayup-1-1
 1,
*Uel property, elset=CompositeLayup-1-1
1.0e7, 0.333,1,5,7,5,2
*End Part
**
**
** ASSEMBLY
**
*Assembly, name=Assembly
**
*Instance, name=Part-1-1, part=Part-1
*End Instance
**
*Nset, nset="X=0", instance=Part-1-1, generate
 5,  8,  1
*Elset, elset="X=0", instance=Part-1-1
 1,
*Nset, nset="X=4", instance=Part-1-1, generate
 1,  4,  1
*Elset, elset="X=4", instance=Part-1-1
 1,
*End Assembly
**
** MATERIALS
**
**
** BOUNDARY CONDITIONS
**
** Name: BC-1 Type: Symmetry/Antisymmetry/Encastre
*Boundary
"X=0", XSYMM
** ----------------------------------------------------------------
**
** STEP: DISP=1
**
*Step, name="DISP=1", nlgeom=NO, inc=1000
UX=1
*Static
0.1, 1., 1e-05, 1.
**
** BOUNDARY CONDITIONS
**
** Name: BC-2 Type: Displacement/Rotation
*Boundary
"X=4", 1, 1, 1.
**
** OUTPUT REQUESTS
**
*Restart, write, frequency=0
**
** FIELD OUTPUT: F-Output-1
**
*Output, field, variable=PRESELECT
**
** HISTORY OUTPUT: H-Output-1
**
*Output, history, variable=PRESELECT
*End Step
