*HEADING
 DAMAGED ELASTICITY MODEL WITH USER SUBROUTINE USDFLD
*ELEMENT, TYPE=T2D2, ELSET=ONE
1, 1, 2
*NODE
1,  0., 0.
2, 10., 0.
*SOLID SECTION, ELSET=ONE, MATERIAL=ELASTIC
1.
*MATERIAL, NAME=ELASTIC
*ELASTIC, DEPENDENCIES=1
** Table of modulus values decreasing as a function
** of field variable 1.
2000., 0.3, 0., 0.00
1500., 0.3, 0., 0.01
1200., 0.3, 0., 0.02
1000., 0.3, 0., 0.04
*USER DEFINED FIELD
*DEPVAR
1
*BOUNDARY
1, 1, 2
2, 2
*STEP
*STATIC
0.1, 1.0, 0.0, 0.1
*CLOAD
2, 1, 20.
*END STEP
*STEP
*STATIC
0.1, 1.0, 0.0, 0.1
*CLOAD
2, 1, 0.
*END STEP
*STEP, INC=20
*STATIC
0.1, 2.0, 0.0, 0.1
*CLOAD
2, 1, 40.
*END STEP
